# OpenSim document version 30000
MarkerSet:
  Marker R.Shoulder: torso (0 0.460256 0.16118) fixed=true
  Marker L.Shoulder: torso (0 0.460256 -0.16118) fixed=true
  Marker R.Clavicle: torso (0.08849 0.417211 0.0369511)
  Marker L.Clavicle: torso (0.0890556 0.417036 -0.0336428)
  Marker R.Biceps: humerus_r (-0.00896943 -0.167864 0.0341121)
  Marker R.Elbow: humerus_r (0.0108012 -0.303515 0.0378043)
  Marker R.Wrist: radius_r (-0.0309243 -0.201897 0.0195128)
  Marker L.Biceps: humerus_l (0.0166115 -0.162239 -0.0407176)
  Marker L.Elbow: humerus_l (0.0108012 -0.303515 -0.0378043)
  Marker L.Wrist: radius_l (-0.0219136 -0.200319 -0.0183242)
  Marker R.ASIS: pelvis (0.0148066 0.0379437 0.161266) fixed=true
  Marker L.ASIS: pelvis (0.0148066 0.0379437 -0.161266) fixed=true
  Marker S2: pelvis (-0.186475 0.0190676 -0.00487516)
  Marker R.PSIS: pelvis (-0.175401 0.0379437 0.0692941)
  Marker L.PSIS: pelvis (-0.175401 0.0379437 -0.0692941)
  Marker R.TH1: femur_r (0.0953735 -0.158256 0.0714016)
  Marker R.TH2: femur_r (-0.00841266 -0.158305 0.10529)
  Marker R.TH3: femur_r (-0.0165175 -0.28922 0.0956224)
  Marker R.Knee: femur_r (0 -0.428502 0.0498505) fixed=true
  Marker R.SH1: tibia_r (0.0031615 -0.11038 0.0914537)
  Marker R.SH2: tibia_r (0.00244933 -0.222413 0.09578)
  Marker R.SH3: tibia_r (-0.0796345 -0.114587 0.0775167)
  Marker R.SH4: tibia_r (-0.0796609 -0.234658 0.0775587)
  Marker R.Ankle: tibia_r (-0.00617934 -0.468147 0.065501) fixed=true
  Marker R.Toe: calcn_r (0.266345 0.0455483 -0.0144037)
  Marker R.MT5: calcn_r (0.18304 0.0194267 0.077891)
  Marker R.Heel: calcn_r (-0.0225505 0.0225505 -0.0112752) fixed=true
  Marker L.TH1: femur_l (0.0993836 -0.140806 -0.0702759)
  Marker L.TH2: femur_l (0.100595 -0.272868 -0.0637976)
  Marker L.TH3: femur_l (-0.000455967 -0.131976 -0.108067)
  Marker L.TH4: femur_l (-0.0102136 -0.269065 -0.105825)
  Marker L.Knee: femur_l (0 -0.428502 -0.0498505) fixed=true
  Marker L.SH1: tibia_l (0.0342205 -0.106451 -0.0718727)
  Marker L.SH2: tibia_l (-0.0595761 -0.10426 -0.0933942)
  Marker L.SH3: tibia_l (-0.0537606 -0.220728 -0.100549)
  Marker L.Ankle: tibia_l (-0.00617934 -0.468147 -0.065501) fixed=true
  Marker L.Toe: calcn_l (0.272659 0.0539826 0.011975)
  Marker L.Heel: calcn_l (-0.0225505 0.0225505 0.0112752) fixed=true
  Marker L.MT5: calcn_l (0.185226 0.0151187 -0.0730415)
