# OpenSim document version 30000
MarkerSet:
  Marker R.Shoulder: torso (0 0.44726 0.151118) fixed=true
  Marker L.Shoulder: torso (0 0.44726 -0.151118) fixed=true
  Marker R.Clavicle: torso (0.0489537 0.41195 0.0266053) fixed=true
  Marker L.Clavicle: torso (0.0489537 0.41195 -0.0266053) fixed=true
  Marker R.Biceps: humerus_r (-0.00851319 -0.12426 0.0559686) fixed=true
  Marker R.Elbow: humerus_r (0.0112033 -0.314813 0.0392116) fixed=true
  Marker R.Forearm: ulna_r (0.0265825 -0.104987 0.0423265) fixed=true
  Marker R.Wrist: radius_r (-0.0293932 -0.235146 0.00587865) fixed=true
  Marker L.Biceps: humerus_l (0.0283406 -0.133356 -0.0255046) fixed=true
  Marker L.Elbow: humerus_l (0.0112033 -0.314813 -0.0392116) fixed=true
  Marker L.Forearm: ulna_l (0.0185422 -0.104474 -0.036956) fixed=true
  Marker L.Wrist: radius_l (-0.0293932 -0.235146 -0.00587865) fixed=true
  Marker R.ASIS: pelvis (0.0137421 0.0317874 0.128)
  Marker L.ASIS: pelvis (0.0137421 0.0317874 -0.128)
  Marker S2: pelvis (-0.176172 0.00487145 -0.00841942)
  Marker R.PSIS: pelvis (-0.162791 0.0317874 0.055)
  Marker L.PSIS: pelvis (-0.162791 0.0317874 -0.055)
  Marker R.TH1: femur_r (0.0687809 -0.0724061 0.078149)
  Marker R.TH2: femur_r (-0.0377894 -0.0751142 0.0920331)
  Marker R.TH3: femur_r (-0.0416504 -0.205836 0.0901059)
  Marker R.Knee: femur_r (0 -0.44282 0.0515162) fixed=true
  Marker R.SH1: tibia_r (0.0119441 -0.142717 0.0829906)
  Marker R.SH2: tibia_r (0.0124551 -0.254003 0.0686288)
  Marker R.SH3: tibia_r (-0.0715689 -0.147457 0.0746418)
  Marker R.SH4: tibia_r (-0.0703779 -0.264817 0.0593311)
  Marker R.Ankle: tibia_r (-0.00563661 -0.42703 0.0597481) fixed=true
  Marker R.Toe: calcn_r (0.24856 0.0537626 -0.0127869) fixed=true
  Marker R.MT5: calcn_r (0.168603 0.0161752 0.0639042) fixed=true
  Marker R.Heel: calcn_r (-0.0207826 0.0252505 -0.0121809) fixed=true
  Marker L.TH1: femur_l (0.0611168 -0.0732731 -0.0961503)
  Marker L.TH2: femur_l (0.0738191 -0.20426 -0.0848627)
  Marker L.TH3: femur_l (-0.0448865 -0.0761385 -0.0921999)
  Marker L.TH4: femur_l (-0.0444976 -0.210491 -0.0821457)
  Marker L.Knee: femur_l (0 -0.44282 -0.0515162) fixed=true
  Marker L.SH1: tibia_l (0.0252233 -0.103987 -0.0674022)
  Marker L.SH2: tibia_l (-0.0712601 -0.0964289 -0.0734816)
  Marker L.SH3: tibia_l (-0.0720015 -0.213494 -0.0589399)
  Marker L.Ankle: tibia_l (-0.00563661 -0.42703 -0.0597481) fixed=true
  Marker L.Toe: calcn_l (0.245752 0.0596425 0.0107324) fixed=true
  Marker L.Heel: calcn_l (-0.0207826 0.0252505 0.0121809) fixed=true
  Marker L.MT5: calcn_l (0.159141 0.0144047 -0.0633685) fixed=true
