# OpenSim document version 10600
# EXAMPLE SET UP FILE FOR USING INDUCED ACCELERATION ANALYSIS WITH THE ROLL CONSTRAINT IN OPENSIM 1.9
# <!-- PLEASE CITE Hamner et al., Muscle Contributions to Propulsion and Support During Running,
# Journal of Biomechanics, vol. 43, pp. 2709-2716, 2010.
AnalyzeTool subject02_running_arms:
  model_file: subject02_running_RRA_cycle02_sim02_07.osim
  replace_actuator_set: false
  actuator_set_files: gait2392_CMC_Actuators.xml
  replace_contact_force_set: true
  output_precision: 4
  results_directory: ./InducedAccelerations_RollOnSurface_mu0p65_thresh15_backLock_-60deg_Unlocked
  initial_time: 0.73
  final_time: 1.4
  solve_for_equilibrium_for_auxiliary_states: false
  maximum_number_of_integrator_steps: 20000
  maximum_integrator_step_size: 1
  integrator_error_tolerance: 1e-7
  integrator_fine_tolerance: 1e-10
  controls_file: subject02_running_CMC_controls.xml
  coordinates_file: subject02_running_CMC_Kinematics_q.sto
  speeds_file: subject02_running_CMC_Kinematics_u.sto
  states_file: subject02_running_CMC_states.sto
  external_loads_file: GRFS.mot
  external_loads_model_kinematics_file: subject02_running_arms_ik.mot
  external_loads_body1: calcn_r
  external_loads_body2: calcn_l
  lowpass_cutoff_frequency_for_load_kinematics: 6
  # MODEL AND ACTUATORS
  # BASIC SETTINGS
  # INTEGRATOR SETTINGS
  # INPUT FILES
  # ANALYSES
  AnalysisSet Analyses:
    InducedAccelerations: step_interval=40 in_degrees=true coordinate_names=knee_angle_r body_names=center_of_mass
        constraint_type=roll force_threshold=15
      ConstraintSet:
        RollingOnSurfaceConstraint right_foot_contact: isDisabled=true rolling_body=calcn_r surface_body=ground
            surface_normal=(0 1 0) surface_height=0 friction_coefficient=0.65 contact_radius=0.01
        RollingOnSurfaceConstraint left_foot_contact: isDisabled=true rolling_body=calcn_l surface_body=ground
            surface_normal=(0 1 0) surface_height=0 friction_coefficient=0.65 contact_radius=0.01
  # EXTERNAL LOADS
