# OpenSim document version 20302
AnalyzeTool subject01_walk1:
  model_file: subject01_simbody_adjusted.osim
  replace_force_set: false
  force_set_files: gait2354_CMC_Actuators.xml
  results_directory: ./ResultsAnalyze
  output_precision: 8
  initial_time: 0.8
  final_time: 1.18
  solve_for_equilibrium_for_auxiliary_states: false
  maximum_number_of_integrator_steps: 20000
  maximum_integrator_step_size: 1
  minimum_integrator_step_size: 0.00000001
  integrator_error_tolerance: 0.00001
  external_loads_file: subject01_walk1_grf.xml
  states_file: ResultsCMC/subject01_walk1_states.sto
  lowpass_cutoff_frequency_for_coordinates: -1
  AnalysisSet Analyses:
    ProbeReporter: start_time=-infinity end_time=infinity step_interval=10
  ControllerSet Controllers:
    ControlSetController: controls_file=ResultsCMC/subject01_walk1_controls.xml
