# OpenSim document version 30000
Model subject01:
  length_units: meters
  force_units: N
  gravity: 0 -9.80665 0
  credits:
    Delp S.L., Loan J.P., Hoy M.G., Zajac F.E., Topp E.L., Rosen J.M., Thelen D.G., Anderson F.C., Seth A. Notes: 3D, 23 DOF gait model created by D.G. Thelen, Univ. of Wisconsin-Madison, and Ajay Seth, Frank C. Anderson, and Scott L. Delp, Stanford University. Lower extremity joint defintions based on Delp et al. (1990). Low back joint and anthropometry based on Anderson and Pandy (1999, 2001). Planar knee model of Yamaguchi and Zajac (1989). Seth replaced tibia translation constraints with a CustomJoint for the knee and removed the patella to eliminate all kinematic constraints; insertions of the quadrucepts are handled with moving points in the tibia frame as defined by Delp 1990. Number of muscles was reduced by Anderson to improve simulation speed for demonstrations and is not intended to be used in research. License: Creative Commons (CCBY 3.0). You are free to distribute, remix, tweak, and build upon this work, even commercially, as long as you credit us for the original creation. http://creativecommons.org/licenses/by/3.0/ More Information: http://simtk-confluence.stanford.edu:8080/display/OpenSim/Gait+2392+and+2354+Models
  publications:
    Delp, S.L., Loan, J.P., Hoy, M.G., Zajac, F.E., Topp E.L., Rosen, J.M.: An interactive graphics-based model of the lower extremity to study orthopaedic surgical procedures, IEEE Transactions on Biomedical Engineering, vol. 37, pp. 757-767, 1990. Yamaguchi G.T., Zajac F.E.: A planar model of the knee joint to characterize the knee extensor mechanism." J . Biomech. vol. 22. pp. 1-10. 1989. Anderson F.C., Pandy M.G.: A dynamic optimization solution for vertical jumping in three dimensions. Computer Methods in Biomechanics and Biomedical Engineering 2:201-231, 1999. Anderson F.C., Pandy M.G.: Dynamic optimization of human walking. Journal of Biomechanical Engineering 123:381-390, 2001.
  BodySet:
    Body ground: mass=0 mass_center=(0 0 0) inertia_xx=0 inertia_yy=0 inertia_zz=0
    Body pelvis: mass=11.37517 mass_center=(-0.0724376 0 0) inertia_xx=0.1042331 inertia_yy=0.08831422
        inertia_zz=0.05870716 meshes=(sacrum.vtp pelvis.vtp l_pelvis.vtp)
      CustomJoint ground_pelvis: parent_body=ground location_in_parent=(0 0 0) location=(0 0 0)
        Coordinate pelvis_tilt: motion_type=rotational default_value=0 range=(-1.570796 1.570796) clamped=false
        Coordinate pelvis_list: motion_type=rotational default_value=0 range=(-1.570796 1.570796) clamped=false
        Coordinate pelvis_rotation: motion_type=rotational default_value=0 range=(-1.570796 1.570796) clamped=false
        Coordinate pelvis_tx: motion_type=translational default_value=0 range=(-5 5) clamped=false
        Coordinate pelvis_ty: motion_type=translational default_value=0 range=(-1 2) clamped=false
        Coordinate pelvis_tz: motion_type=translational default_value=0 range=(-3 3) clamped=false
        SpatialTransform:
          TransformAxis rotation1: coordinates=pelvis_tilt axis=(0 0 1) LinearFunction(coefficients=1 0)
          TransformAxis rotation2: coordinates=pelvis_list axis=(1 0 0) LinearFunction(coefficients=1 0)
          TransformAxis rotation3: coordinates=pelvis_rotation axis=(0 1 0) LinearFunction(coefficients=1 0)
          TransformAxis translation1: coordinates=pelvis_tx axis=(1 0 0) LinearFunction(coefficients=1 0)
          TransformAxis translation2: coordinates=pelvis_ty axis=(0 1 0) LinearFunction(coefficients=1 0)
          TransformAxis translation3: coordinates=pelvis_tz axis=(0 0 1) LinearFunction(coefficients=1 0)
    Body femur_r: mass=8.984038 mass_center=(0 -0.195031 0) inertia_xx=0.1702207 inertia_yy=0.04462096
        inertia_zz=0.1795009 meshes=femur.vtp
      CustomJoint hip_r: parent_body=pelvis location_in_parent=(-0.0724376 -0.06772454 0.08555218) location=(0 0 0)
        Coordinate hip_flexion_r: motion_type=rotational default_value=0 range=(-2.094395 2.094395) clamped=false
        Coordinate hip_adduction_r: motion_type=rotational default_value=0 range=(-2.094395 2.094395) clamped=false
        Coordinate hip_rotation_r: motion_type=rotational default_value=0 range=(-2.094395 2.094395) clamped=false
        SpatialTransform: axes_held_at_zero=(translation1 translation2 translation3)
          TransformAxis rotation1: coordinates=hip_flexion_r axis=(0 0 1) LinearFunction(coefficients=1 0)
          TransformAxis rotation2: coordinates=hip_adduction_r axis=(1 0 0) LinearFunction(coefficients=1 0)
          TransformAxis rotation3: coordinates=hip_rotation_r axis=(0 1 0) LinearFunction(coefficients=1 0)
    Body tibia_r: mass=3.581001 mass_center=(0 -0.184557 0) inertia_xx=0.04756937 inertia_yy=0.004813567
        inertia_zz=0.04823005 meshes=(tibia.vtp fibula.vtp)
      CustomJoint knee_r: parent_body=femur_r location_in_parent=(0 0 0) location=(0 0 0)
        Coordinate knee_angle_r: motion_type=rotational default_value=0 range=(-2.094395 0.1745329) clamped=false
        SpatialTransform: axes_held_at_zero=(rotation2 rotation3 translation3)
          TransformAxis rotation1: coordinates=knee_angle_r axis=(0 0 1) LinearFunction(coefficients=1 0)
          TransformAxis translation1: coordinates=knee_angle_r axis=(1 0 0)
            MultiplierFunction: scale=1.14724
              SimmSpline: x=(-2.0944 -1.74533 -1.39626 -1.0472 -0.698132 -0.349066 -0.174533 0.197344 0.337395 0.490178 1.52146 2.0944)
                  y=(-0.0032 0.00179 0.00411 0.0041 0.00212 -0.001 -0.0031 -0.005227 -0.005435 -0.005574 -0.005435 -0.00525)
          TransformAxis translation2: coordinates=knee_angle_r axis=(0 1 0)
            MultiplierFunction: scale=1.14724
              SimmSpline: x=(-2.0944 -1.22173 -0.523599 -0.349066 -0.174533 0.159149 2.0944)
                  y=(-0.4226 -0.4082 -0.399 -0.3976 -0.3966 -0.395264 -0.396)
    Body talus_r: mass=0.09658802 mass_center=(0 0 0) inertia_xx=0.001198606 inertia_yy=0.001198606
        inertia_zz=0.001198606 meshes=talus.vtp
      CustomJoint ankle_r: parent_body=tibia_r location_in_parent=(0 -0.4250649 0) location=(0 0 0)
        Coordinate ankle_angle_r: motion_type=rotational default_value=0 range=(-1.570796 1.570796) clamped=false
        SpatialTransform: axes_held_at_zero=(rotation2 rotation3 translation1 translation2 translation3)
          TransformAxis rotation1: coordinates=ankle_angle_r axis=(-0.1050135 -0.1740224 0.9791263)
              LinearFunction(coefficients=1 0)
    Body calcn_r: mass=1.20735 mass_center=(0.102708 0.0308125 0) inertia_xx=0.001426474 inertia_yy=0.003973749
        inertia_zz=0.004177531 meshes=foot.vtp
      CustomJoint subtalar_r: parent_body=talus_r location_in_parent=(-0.05432871 -0.04673138 0.008822706)
          location=(0 0 0)
        Coordinate subtalar_angle_r: motion_type=rotational default_value=0 range=(-1.570796 1.570796) clamped=false
        SpatialTransform: axes_held_at_zero=(rotation2 rotation3 translation1 translation2 translation3)
          TransformAxis rotation1: coordinates=subtalar_angle_r axis=(0.7871796 0.6047475 -0.1209495)
              LinearFunction(coefficients=1 0)
    Body toes_r: mass=0.2092097 mass_center=(0.0355371 0.00616251 -0.017974) inertia_xx=0.000101891
        inertia_yy=0.000203782 inertia_zz=0.000101891 meshes=bofoot.vtp
      CustomJoint mtp_r: parent_body=calcn_r location_in_parent=(0.1836428 -0.00205417 0.001109252) location=(0 0 0)
        Coordinate mtp_angle_r: motion_type=rotational default_value=0 range=(-1.570796 1.570796) clamped=false
        SpatialTransform: axes_held_at_zero=(rotation2 rotation3 translation1 translation2 translation3)
          TransformAxis rotation1: coordinates=mtp_angle_r axis=(-0.5809544 0 0.8139361)
              LinearFunction(coefficients=1 0)
    Body femur_l: mass=8.984038 mass_center=(0 -0.195031 0) inertia_xx=0.1702207 inertia_yy=0.04462096
        inertia_zz=0.1795009 meshes=l_femur.vtp
      CustomJoint hip_l: parent_body=pelvis location_in_parent=(-0.0724376 -0.06772454 -0.08555218) location=(0 0 0)
        Coordinate hip_flexion_l: motion_type=rotational default_value=0 range=(-2.094395 2.094395) clamped=false
        Coordinate hip_adduction_l: motion_type=rotational default_value=0 range=(-2.094395 2.094395) clamped=false
        Coordinate hip_rotation_l: motion_type=rotational default_value=0 range=(-2.094395 2.094395) clamped=false
        SpatialTransform: axes_held_at_zero=(translation1 translation2 translation3)
          TransformAxis rotation1: coordinates=hip_flexion_l axis=(0 0 1) LinearFunction(coefficients=1 0)
          TransformAxis rotation2: coordinates=hip_adduction_l axis=(-1 0 0) LinearFunction(coefficients=1 0)
          TransformAxis rotation3: coordinates=hip_rotation_l axis=(0 -1 0) LinearFunction(coefficients=1 0)
    Body tibia_l: mass=3.581001 mass_center=(0 -0.184557 0) inertia_xx=0.04756937 inertia_yy=0.004813567
        inertia_zz=0.04823005 meshes=(l_tibia.vtp l_fibula.vtp)
      CustomJoint knee_l: parent_body=femur_l location_in_parent=(0 0 0) location=(0 0 0)
        Coordinate knee_angle_l: motion_type=rotational default_value=0 range=(-2.094395 0.1745329) clamped=false
        SpatialTransform: axes_held_at_zero=(rotation2 rotation3 translation3)
          TransformAxis rotation1: coordinates=knee_angle_l axis=(0 0 1) LinearFunction(coefficients=1 0)
          TransformAxis translation1: coordinates=knee_angle_l axis=(1 0 0)
            MultiplierFunction: scale=1.14724
              SimmSpline: x=(-2.0944 -1.74533 -1.39626 -1.0472 -0.698132 -0.349066 -0.174533 0.197344 0.337395 0.490178 1.52146 2.0944)
                  y=(-0.0032 0.00179 0.00411 0.0041 0.00212 -0.001 -0.0031 -0.005227 -0.005435 -0.005574 -0.005435 -0.00525)
          TransformAxis translation2: coordinates=knee_angle_l axis=(0 1 0)
            MultiplierFunction: scale=1.14724
              SimmSpline: x=(-2.0944 -1.22173 -0.523599 -0.349066 -0.174533 0.159149 2.0944)
                  y=(-0.4226 -0.4082 -0.399 -0.3976 -0.3966 -0.395264 -0.396)
    Body talus_l: mass=0.09658802 mass_center=(0 0 0) inertia_xx=0.001198606 inertia_yy=0.001198606
        inertia_zz=0.001198606 meshes=l_talus.vtp
      CustomJoint ankle_l: parent_body=tibia_l location_in_parent=(0 -0.4250649 0) location=(0 0 0)
        Coordinate ankle_angle_l: motion_type=rotational default_value=0 range=(-1.047198 1.047198) clamped=false
        SpatialTransform: axes_held_at_zero=(rotation2 rotation3 translation1 translation2 translation3)
          TransformAxis rotation1: coordinates=ankle_angle_l axis=(0.1050135 0.1740224 0.9791263)
              LinearFunction(coefficients=1 0)
    Body calcn_l: mass=1.20735 mass_center=(0.102708 0.0308125 0) inertia_xx=0.001426474 inertia_yy=0.003973749
        inertia_zz=0.004177531 meshes=l_foot.vtp
      CustomJoint subtalar_l: parent_body=talus_l location_in_parent=(-0.05432871 -0.04673138 -0.008822706)
          location=(0 0 0)
        Coordinate subtalar_angle_l: motion_type=rotational default_value=0 range=(-1.570796 1.570796) clamped=false
        SpatialTransform: axes_held_at_zero=(rotation2 rotation3 translation1 translation2 translation3)
          TransformAxis rotation1: coordinates=subtalar_angle_l axis=(-0.7871796 -0.6047475 -0.1209495)
              LinearFunction(coefficients=1 0)
    Body toes_l: mass=0.2092097 mass_center=(0.0355371 0.00616251 0.017974) inertia_xx=0.000101891
        inertia_yy=0.000203782 inertia_zz=0.000101891 meshes=l_bofoot.vtp
      CustomJoint mtp_l: parent_body=calcn_l location_in_parent=(0.1836428 -0.00205417 -0.001109252) location=(0 0 0)
        Coordinate mtp_angle_l: motion_type=rotational default_value=0 range=(-1.047198 1.047198) clamped=false
        SpatialTransform: axes_held_at_zero=(rotation2 rotation3 translation1 translation2 translation3)
          TransformAxis rotation1: coordinates=mtp_angle_l axis=(0.5809544 0 0.8139361)
              LinearFunction(coefficients=1 0)
    Body torso: mass=33.06845 mass_center=(0.0168915 0.34551 0.015553) inertia_xx=1.660314 inertia_yy=0.8507069
        inertia_zz=1.611783 meshes=(hat_spine.vtp hat_jaw.vtp hat_skull.vtp hat_ribs.vtp)
      CustomJoint back: parent_body=pelvis location_in_parent=(-0.1031749 0.08350303 0) location=(0 0 0)
        Coordinate lumbar_extension: motion_type=rotational default_value=0 range=(-1.570796 1.570796) clamped=false
        Coordinate lumbar_bending: motion_type=rotational default_value=0 range=(-1.570796 1.570796) clamped=false
        Coordinate lumbar_rotation: motion_type=rotational default_value=0 range=(-1.570796 1.570796) clamped=false
        SpatialTransform: axes_held_at_zero=(translation1 translation2 translation3)
          TransformAxis rotation1: coordinates=lumbar_extension axis=(0 0 1) LinearFunction(coefficients=1 0)
          TransformAxis rotation2: coordinates=lumbar_bending axis=(1 0 0) LinearFunction(coefficients=1 0)
          TransformAxis rotation3: coordinates=lumbar_rotation axis=(0 1 0) LinearFunction(coefficients=1 0)
  ForceSet:
    Thelen2003Muscle [values shared by the 54 below unless stated]: min_control=0 max_control=1 optimal_force=1
        max_contraction_velocity=10 activation_time_constant=0.01 deactivation_time_constant=0.04
        FmaxTendonStrain=0.033 FmaxMuscleStrain=0.6 KshapeActive=0.5 KshapePassive=4 Af=0.3 Flen=1.8
    Thelen2003Muscle glut_med1_r: max_isometric_force=1119 optimal_fiber_length=0.05640635
        tendon_slack_length=0.08223729 pennation_angle_at_optimal=0.1396263 [radians]
      PathPoint P1: pelvis (-0.0418027 0.0311471 0.123871)
      PathPoint P2: femur_r (-0.0250098 -0.0134227 0.0636718)
    Thelen2003Muscle glut_med2_r: max_isometric_force=873 optimal_fiber_length=0.08913177
        tendon_slack_length=0.05590513 pennation_angle_at_optimal=0
      PathPoint P1: pelvis (-0.0876013 0.0455937 0.0784826)
      PathPoint P2: femur_r (-0.0295988 -0.00665399 0.0604595)
    Thelen2003Muscle glut_med3_r: max_isometric_force=1000 optimal_fiber_length=0.06853064
        tendon_slack_length=0.05622483 pennation_angle_at_optimal=0.3316126
      PathPoint P1: pelvis (-0.125306 0.0107581 0.0663926)
      PathPoint P2: femur_r (-0.0354497 -0.00539203 0.059427)
    Thelen2003Muscle bifemlh_r: max_isometric_force=2700 optimal_fiber_length=0.1236311 tendon_slack_length=0.369759
        pennation_angle_at_optimal=0
      PathPoint P1: pelvis (-0.129056 -0.105091 0.0711466)
      PathPoint P2: tibia_r (-0.0297545 -0.0355868 0.0290922)
      PathPoint P3: tibia_r (-0.0231314 -0.0556538 0.0339063)
    Thelen2003Muscle bifemsh_r: max_isometric_force=804 optimal_fiber_length=0.1914449 tendon_slack_length=0.09848899
        pennation_angle_at_optimal=0.4014257
      PathPoint P1: femur_r (0.0057362 -0.242182 0.0268454)
      PathPoint P2: tibia_r (-0.0297545 -0.0355868 0.0290922)
      PathPoint P3: tibia_r (-0.0231314 -0.0556538 0.0339063)
    Thelen2003Muscle sar_r: max_isometric_force=156 optimal_fiber_length=0.5742156 tendon_slack_length=0.1104261
        pennation_angle_at_optimal=0
      PathPoint P1: pelvis (-0.015676 -0.00133195 0.127252)
      PathPoint P2: femur_r (-0.00344172 -0.409335 -0.0482988)
      PathPoint P3: tibia_r (-0.00553573 -0.0414191 -0.0394421)
      PathPoint P4: tibia_r (0.00593114 -0.058224 -0.0378604)
      PathPoint P5: tibia_r (0.0240211 -0.0830359 -0.0249108)
    Thelen2003Muscle add_mag2_r: max_isometric_force=2343 optimal_fiber_length=0.1409897 tendon_slack_length=0.1398245
        pennation_angle_at_optimal=0.05235988
      PathPoint P1: pelvis (-0.0851424 -0.12213 0.031557)
      PathPoint P2: femur_r (0.0061951 -0.262144 0.0260423)
    Thelen2003Muscle tfl_r: max_isometric_force=233 optimal_fiber_length=0.1060379 tendon_slack_length=0.4743801
        pennation_angle_at_optimal=0.05235988
      PathPoint P1: pelvis (-0.0318643 0.0219259 0.12715)
      PathPoint P2: femur_r (0.0337289 -0.11415 0.0684902)
      PathPoint P3: femur_r (0.0061951 -0.464517 0.0409565)
      PathPoint P4: tibia_r (0.00593114 -0.0481411 0.0293591)
    Thelen2003Muscle pect_r: max_isometric_force=266 optimal_fiber_length=0.1116559 tendon_slack_length=0.03684646
        pennation_angle_at_optimal=0
      PathPoint P1: pelvis (-0.0441593 -0.0786875 0.0462084)
      PathPoint P2: femur_r (-0.0139963 -0.0943031 0.0290252)
    Thelen2003Muscle grac_r: max_isometric_force=162 optimal_fiber_length=0.3965859 tendon_slack_length=0.1419597
        pennation_angle_at_optimal=0.05235988
      PathPoint P1: pelvis (-0.0758289 -0.121617 0.0286267)
      ConditionalPathPoint P2: tibia_r (-0.0262651 -0.0315339 -0.0373069) range=(-0.436332 0.174533)
          coordinate=knee_angle_r
      PathPoint P3: tibia_r (-0.019207 -0.0509386 -0.0353891)
      PathPoint P4: tibia_r (0.00593114 -0.0826405 -0.0225383)
    Thelen2003Muscle glut_max1_r: max_isometric_force=573 optimal_fiber_length=0.151587 tendon_slack_length=0.1334393
        pennation_angle_at_optimal=0.08726646
      PathPoint P1: pelvis (-0.122437 0.0627041 0.0717204)
      PathPoint P2: pelvis (-0.132273 0.00122949 0.0907775)
      PathPoint P3: femur_r (-0.0524289 -0.0284516 0.0449718)
      PathPoint P4: femur_r (-0.0317785 -0.0649338 0.0539203)
    Thelen2003Muscle glut_max2_r: max_isometric_force=819 optimal_fiber_length=0.1593947 tendon_slack_length=0.1377084
        pennation_angle_at_optimal=0
      PathPoint P1: pelvis (-0.138215 0.0180326 0.0576837)
      PathPoint P2: pelvis (-0.140982 -0.053278 0.0936463)
      PathPoint P3: femur_r (-0.0488724 -0.0608037 0.0336141)
      PathPoint P4: femur_r (-0.0178969 -0.11656 0.0480694)
    Thelen2003Muscle glut_max3_r: max_isometric_force=552 optimal_fiber_length=0.1562884 tendon_slack_length=0.1573737
        pennation_angle_at_optimal=0.08726646
      PathPoint P1: pelvis (-0.159424 -0.0321717 0.00594255)
      PathPoint P2: pelvis (-0.156658 -0.107786 0.0412905)
      PathPoint P3: femur_r (-0.0343025 -0.119428 0.0154877)
      PathPoint P4: femur_r (-0.00688344 -0.162793 0.0471516)
    Thelen2003Muscle iliacus_r: max_isometric_force=1073 optimal_fiber_length=0.1061641 tendon_slack_length=0.1061641
        pennation_angle_at_optimal=0.1221731
      PathPoint P1: pelvis (-0.0690565 0.0373971 0.0874989)
      PathPoint P2: pelvis (-0.0264341 -0.0563517 0.0830932)
      ConditionalPathPoint P3: pelvis (-0.0295078 -0.0824785 0.0836055) range=(-1.5708 0.785398)
          coordinate=hip_flexion_r
      PathPoint P4: femur_r (0.00195031 -0.0622951 0.00653927)
      PathPoint P5: femur_r (-0.0221417 -0.0712436 0.0147994)
    Thelen2003Muscle psoas_r: max_isometric_force=1113 optimal_fiber_length=0.1051723 tendon_slack_length=0.1682757
        pennation_angle_at_optimal=0.1396263
      PathPoint P1: pelvis (-0.0662901 0.09088 0.0296103)
      PathPoint P2: pelvis (-0.0243849 -0.0584009 0.0777654)
      ConditionalPathPoint P3: pelvis (-0.0295078 -0.0824785 0.0836055) range=(-1.5708 0.785398)
          coordinate=hip_flexion_r
      PathPoint P4: femur_r (0.00183558 -0.0581651 0.00435951)
      PathPoint P5: femur_r (-0.0215681 -0.0684902 0.0119313)
    Thelen2003Muscle quad_fem_r: max_isometric_force=381 optimal_fiber_length=0.05807418 tendon_slack_length=0.02581075
        pennation_angle_at_optimal=0
      PathPoint P1: pelvis (-0.117109 -0.117929 0.053278)
      PathPoint P2: femur_r (-0.0437098 -0.0411859 0.041989)
    Thelen2003Muscle gem_r: max_isometric_force=164 optimal_fiber_length=0.02609439 tendon_slack_length=0.04240338
        pennation_angle_at_optimal=0
      PathPoint P1: pelvis (-0.116085 -0.0840153 0.0731548)
      PathPoint P2: femur_r (-0.0162908 -0.00378589 0.0508227)
    Thelen2003Muscle peri_r: max_isometric_force=444 optimal_fiber_length=0.02732926 tendon_slack_length=0.1208794
        pennation_angle_at_optimal=0.1745329
      PathPoint P1: pelvis (-0.143031 0.000307373 0.0240776)
      PathPoint P2: pelvis (-0.122232 -0.0282783 0.0673147)
      PathPoint P3: femur_r (-0.0169792 -0.00413006 0.0501344)
    Thelen2003Muscle rect_fem_r: max_isometric_force=1169 optimal_fiber_length=0.1304623 tendon_slack_length=0.354766
        pennation_angle_at_optimal=0.08726646
      PathPoint P1: pelvis (-0.030225 -0.0318643 0.0991791)
      ConditionalPathPoint P2: femur_r (0.0383178 -0.462338 0.00217976) range=(-2.61799 -1.45997)
          coordinate=knee_angle_r
      MovingPathPoint P3: tibia_r (0.0610488 0.0207432 0.00138393) x_coordinate=knee_angle_r y_coordinate=knee_angle_r
          z_coordinate=knee_angle_r
        x_location: MultiplierFunction: scale=0.988523
          SimmSpline: x=(-2.0944 -1.99997 -1.5708 -1.45752 -1.39626 -1.0472 -0.698132 -0.526391 -0.349066 -0.174533 0 0.00017453 0.00034907 0.0279253 0.0872665 0.174533 2.0944)
              y=(0.0155805 0.0179938 0.0275081 0.0296564 0.0307615 0.0365695 0.0422074 0.0450902 0.048391 0.0534299 0.0617576 0.0617669 0.0617762 0.0633083 0.066994 0.0733035 0.0573481)
        y_location: MultiplierFunction: scale=0.988523
          SimmSpline: x=(-2.0944 -1.99997 -1.5708 -1.45752 -1.39626 -1.0472 -0.698132 -0.526391 -0.349066 -0.174533 0 0.00017453 0.00034907 0.0279253 0.0872665 0.174533 2.0944)
              y=(0.0234116 0.0237613 0.0251141 0.0252795 0.0253146 0.0249184 0.0242373 0.0238447 0.0234197 0.0227644 0.020984 0.0209814 0.0209788 0.0205225 0.0191754 0.0159554 -0.0673774)
        z_location: MultiplierFunction: scale=0.988523
          SimmSpline: x=(-2.0944 0.1745) y=(0.0014 0.0014)
    Thelen2003Muscle vas_int_r: max_isometric_force=5000 optimal_fiber_length=0.1246787 tendon_slack_length=0.1351657
        pennation_angle_at_optimal=0.05235988
      PathPoint P1: femur_r (0.03327 -0.220729 0.0355644)
      PathPoint P2: femur_r (0.0384325 -0.239085 0.0326963)
      ConditionalPathPoint P3: femur_r (0.0393503 -0.462338 0.00630982) range=(-2.61799 -1.42) coordinate=knee_angle_r
      MovingPathPoint P4: tibia_r (0.0548266 0.025002 0.00177934) x_coordinate=knee_angle_r y_coordinate=knee_angle_r
          z_coordinate=knee_angle_r
        x_location: MultiplierFunction: scale=0.988523
          SimmSpline: x=(-2.0944 -1.99997 -1.5708 -1.45752 -1.39626 -1.0472 -0.698132 -0.526391 -0.349066 -0.174533 0 0.00017453 0.00034907 0.0279253 0.0872665 0.174533 2.0944)
              y=(0.0082733 0.0106866 0.0202042 0.022353 0.0234583 0.0292715 0.0349465 0.037871 0.0412569 0.0465287 0.0554632 0.0554735 0.0554837 0.0571717 0.061272 0.0684368 0.0648818)
        y_location: MultiplierFunction: scale=0.988523
          SimmSpline: x=(-2.0944 -1.99997 -1.5708 -1.45752 -1.39626 -1.0472 -0.698132 -0.526391 -0.349066 -0.174533 0 0.00017453 0.00034907 0.0279253 0.0872665 0.174533 2.0944)
              y=(0.025599 0.0259487 0.0273124 0.0274796 0.0275151 0.0271363 0.0265737 0.0263073 0.0261187 0.0260129 0.0252923 0.0252911 0.0252898 0.0250526 0.0242191 0.0218288 -0.0685706)
        z_location: MultiplierFunction: scale=0.988523
          SimmSpline: x=(-2.0944 2.0944) y=(0.0018 0.0018)
    Thelen2003Muscle med_gas_r: max_isometric_force=2500 optimal_fiber_length=0.0901287 tendon_slack_length=0.3605148
        pennation_angle_at_optimal=0.296706
      PathPoint P1: femur_r (-0.0217976 -0.450751 -0.0269601)
      ConditionalPathPoint P2: femur_r (-0.0344172 -0.46142 -0.0295988) range=(-0.785398 0.174533)
          coordinate=knee_angle_r
      PathPoint P3: calcn_r (0 0.0318396 -0.00544355)
    Thelen2003Muscle soleus_r: max_isometric_force=4000 optimal_fiber_length=0.0502888 tendon_slack_length=0.251444
        pennation_angle_at_optimal=0.4363323
      PathPoint P1: tibia_r (-0.00237246 -0.151541 0.00701851)
      PathPoint P2: calcn_r (0 0.0318396 -0.00544355)
    Thelen2003Muscle tib_post_r: max_isometric_force=3600 optimal_fiber_length=0.03107549 tendon_slack_length=0.3107549
        pennation_angle_at_optimal=0.2094395
      PathPoint P1: tibia_r (-0.00929212 -0.133253 0.00187819)
      PathPoint P2: tibia_r (-0.0142347 -0.400451 -0.0226372)
      PathPoint P3: calcn_r (0.0428294 0.0343046 -0.0293746)
      PathPoint P4: calcn_r (0.0792909 0.0163306 -0.0288611)
    Thelen2003Muscle tib_ant_r: max_isometric_force=3000 optimal_fiber_length=0.09791263 tendon_slack_length=0.2228012
        pennation_angle_at_optimal=0.08726646
      PathPoint P1: tibia_r (0.0176946 -0.160536 0.011368)
      PathPoint P2: tibia_r (0.0325224 -0.390565 -0.0174969)
      PathPoint P3: calcn_r (0.119758 0.0182821 -0.0313261)
    Thelen2003Muscle glut_med1_l: max_isometric_force=1119 optimal_fiber_length=0.05640635
        tendon_slack_length=0.08223729 pennation_angle_at_optimal=0.1396263
      PathPoint P1: pelvis (-0.0418027 0.0311471 -0.123871)
      PathPoint P2: femur_l (-0.0250098 -0.0134227 -0.0636718)
    Thelen2003Muscle glut_med2_l: max_isometric_force=873 optimal_fiber_length=0.08913177
        tendon_slack_length=0.05590513 pennation_angle_at_optimal=0
      PathPoint P1: pelvis (-0.0876013 0.0455937 -0.0784826)
      PathPoint P2: femur_l (-0.0295988 -0.00665399 -0.0604595)
    Thelen2003Muscle glut_med3_l: max_isometric_force=1000 optimal_fiber_length=0.06853064
        tendon_slack_length=0.05622483 pennation_angle_at_optimal=0.3316126
      PathPoint P1: pelvis (-0.125306 0.0107581 -0.0663926)
      PathPoint P2: femur_l (-0.0354497 -0.00539203 -0.059427)
    Thelen2003Muscle bifemlh_l: max_isometric_force=2700 optimal_fiber_length=0.1236311 tendon_slack_length=0.369759
        pennation_angle_at_optimal=0
      PathPoint P1: pelvis (-0.129056 -0.105091 -0.0711466)
      PathPoint P2: tibia_l (-0.0297545 -0.0355868 -0.0290922)
      PathPoint P3: tibia_l (-0.0231314 -0.0556538 -0.0339063)
    Thelen2003Muscle bifemsh_l: max_isometric_force=804 optimal_fiber_length=0.1914449 tendon_slack_length=0.09848899
        pennation_angle_at_optimal=0.4014257
      PathPoint P1: femur_l (0.0057362 -0.242182 -0.0268454)
      PathPoint P2: tibia_l (-0.0297545 -0.0355868 -0.0290922)
      PathPoint P3: tibia_l (-0.0231314 -0.0556538 -0.0339063)
    Thelen2003Muscle sar_l: max_isometric_force=156 optimal_fiber_length=0.5742156 tendon_slack_length=0.1104261
        pennation_angle_at_optimal=0
      PathPoint P1: pelvis (-0.015676 -0.00133195 -0.127252)
      PathPoint P2: femur_l (-0.00344172 -0.409335 0.0482988)
      PathPoint P3: tibia_l (-0.00553573 -0.0414191 0.0394421)
      PathPoint P4: tibia_l (0.00593114 -0.058224 0.0378604)
      PathPoint P5: tibia_l (0.0240211 -0.0830359 0.0249108)
    Thelen2003Muscle add_mag2_l: max_isometric_force=2343 optimal_fiber_length=0.1409897 tendon_slack_length=0.1398245
        pennation_angle_at_optimal=0.05235988
      PathPoint P1: pelvis (-0.0851424 -0.12213 -0.031557)
      PathPoint P2: femur_l (0.0061951 -0.262144 -0.0260423)
    Thelen2003Muscle tfl_l: max_isometric_force=233 optimal_fiber_length=0.1060379 tendon_slack_length=0.4743801
        pennation_angle_at_optimal=0.05235988
      PathPoint P1: pelvis (-0.0318643 0.0219259 -0.12715)
      PathPoint P2: femur_l (0.0337289 -0.11415 -0.0684902)
      PathPoint P3: femur_l (0.0061951 -0.464517 -0.0409565)
      PathPoint P4: tibia_l (0.00593114 -0.0481411 -0.0293591)
    Thelen2003Muscle pect_l: max_isometric_force=266 optimal_fiber_length=0.1116559 tendon_slack_length=0.03684646
        pennation_angle_at_optimal=0
      PathPoint P1: pelvis (-0.0441593 -0.0786875 -0.0462084)
      PathPoint P2: femur_l (-0.0139963 -0.0943031 -0.0290252)
    Thelen2003Muscle grac_l: max_isometric_force=162 optimal_fiber_length=0.3965859 tendon_slack_length=0.1419597
        pennation_angle_at_optimal=0.05235988
      PathPoint P1: pelvis (-0.0758289 -0.121617 -0.0286267)
      ConditionalPathPoint P2: tibia_l (-0.0262651 -0.0315339 0.0373069) range=(-0.436332 0.174533)
          coordinate=knee_angle_l
      PathPoint P3: tibia_l (-0.019207 -0.0509386 0.0353891)
      PathPoint P4: tibia_l (0.00593114 -0.0826405 0.0225383)
    Thelen2003Muscle glut_max1_l: max_isometric_force=573 optimal_fiber_length=0.151587 tendon_slack_length=0.1334393
        pennation_angle_at_optimal=0.08726646
      PathPoint P1: pelvis (-0.122437 0.0627041 -0.0717204)
      PathPoint P2: pelvis (-0.132273 0.00122949 -0.0907775)
      PathPoint P3: femur_l (-0.0524289 -0.0284516 -0.0449718)
      PathPoint P4: femur_l (-0.0317785 -0.0649338 -0.0539203)
    Thelen2003Muscle glut_max2_l: max_isometric_force=819 optimal_fiber_length=0.1593947 tendon_slack_length=0.1377084
        pennation_angle_at_optimal=0
      PathPoint P1: pelvis (-0.138215 0.0180326 -0.0576837)
      PathPoint P2: pelvis (-0.140982 -0.053278 -0.0936463)
      PathPoint P3: femur_l (-0.0488724 -0.0608037 -0.0336141)
      PathPoint P4: femur_l (-0.0178969 -0.11656 -0.0480694)
    Thelen2003Muscle glut_max3_l: max_isometric_force=552 optimal_fiber_length=0.1562884 tendon_slack_length=0.1573737
        pennation_angle_at_optimal=0.08726646
      PathPoint P1: pelvis (-0.159424 -0.0321717 -0.00594255)
      PathPoint P2: pelvis (-0.156658 -0.107786 -0.0412905)
      PathPoint P3: femur_l (-0.0343025 -0.119428 -0.0154877)
      PathPoint P4: femur_l (-0.00688344 -0.162793 -0.0471516)
    Thelen2003Muscle iliacus_l: max_isometric_force=1073 optimal_fiber_length=0.1061641 tendon_slack_length=0.1061641
        pennation_angle_at_optimal=0.1221731
      PathPoint P1: pelvis (-0.0690565 0.0373971 -0.0874989)
      PathPoint P2: pelvis (-0.0264341 -0.0563517 -0.0830932)
      ConditionalPathPoint P3: pelvis (-0.0295078 -0.0824785 -0.0836055) range=(-1.5708 0.785398)
          coordinate=hip_flexion_l
      PathPoint P4: femur_l (0.00195031 -0.0622951 -0.00653927)
      PathPoint P5: femur_l (-0.0221417 -0.0712436 -0.0147994)
    Thelen2003Muscle psoas_l: max_isometric_force=1113 optimal_fiber_length=0.1051723 tendon_slack_length=0.1682757
        pennation_angle_at_optimal=0.1396263
      PathPoint P1: pelvis (-0.0662901 0.09088 -0.0296103)
      PathPoint P2: pelvis (-0.0243849 -0.0584009 -0.0777654)
      ConditionalPathPoint P3: pelvis (-0.0295078 -0.0824785 -0.0836055) range=(-1.5708 0.785398)
          coordinate=hip_flexion_l
      PathPoint P4: femur_l (0.00183558 -0.0581651 -0.00435951)
      PathPoint P5: femur_l (-0.0215681 -0.0684902 -0.0119313)
    Thelen2003Muscle quad_fem_l: max_isometric_force=381 optimal_fiber_length=0.05807418 tendon_slack_length=0.02581075
        pennation_angle_at_optimal=0
      PathPoint P1: pelvis (-0.117109 -0.117929 -0.053278)
      PathPoint P2: femur_l (-0.0437098 -0.0411859 -0.041989)
    Thelen2003Muscle gem_l: max_isometric_force=164 optimal_fiber_length=0.02609439 tendon_slack_length=0.04240338
        pennation_angle_at_optimal=0
      PathPoint P1: pelvis (-0.116085 -0.0840153 -0.0731548)
      PathPoint P2: femur_l (-0.0162908 -0.00378589 -0.0508227)
    Thelen2003Muscle peri_l: max_isometric_force=444 optimal_fiber_length=0.02732926 tendon_slack_length=0.1208794
        pennation_angle_at_optimal=0.1745329
      PathPoint P1: pelvis (-0.143031 0.000307373 -0.0240776)
      PathPoint P2: pelvis (-0.122232 -0.0282783 -0.0673147)
      PathPoint P3: femur_l (-0.0169792 -0.00413006 -0.0501344)
    Thelen2003Muscle rect_fem_l: max_isometric_force=1169 optimal_fiber_length=0.1304623 tendon_slack_length=0.354766
        pennation_angle_at_optimal=0.08726646
      PathPoint P1: pelvis (-0.030225 -0.0318643 -0.0991791)
      ConditionalPathPoint P2: femur_l (0.0383178 -0.462338 -0.00217976) range=(-2.61799 -1.45997)
          coordinate=knee_angle_l
      MovingPathPoint P3: tibia_l (0.0610488 0.0207432 -0.00138393) x_coordinate=knee_angle_l y_coordinate=knee_angle_l
          z_coordinate=knee_angle_l
        x_location: MultiplierFunction: scale=0.988523
          SimmSpline: x=(-2.0944 -1.99997 -1.5708 -1.45752 -1.39626 -1.0472 -0.698132 -0.526391 -0.349066 -0.174533 0 0.00017453 0.00034907 0.0279253 0.0872665 0.174533 2.0944)
              y=(0.0155805 0.0179938 0.0275081 0.0296564 0.0307615 0.0365695 0.0422074 0.0450902 0.048391 0.0534299 0.0617576 0.0617669 0.0617762 0.0633083 0.066994 0.0733035 0.0573481)
        y_location: MultiplierFunction: scale=0.988523
          SimmSpline: x=(-2.0944 -1.99997 -1.5708 -1.45752 -1.39626 -1.0472 -0.698132 -0.526391 -0.349066 -0.174533 0 0.00017453 0.00034907 0.0279253 0.0872665 0.174533 2.0944)
              y=(0.0234116 0.0237613 0.0251141 0.0252795 0.0253146 0.0249184 0.0242373 0.0238447 0.0234197 0.0227644 0.020984 0.0209814 0.0209788 0.0205225 0.0191754 0.0159554 -0.0673774)
        z_location: MultiplierFunction: scale=0.988523
          SimmSpline: x=(-2.0944 0.1745) y=(-0.0014 -0.0014)
    Thelen2003Muscle vas_int_l: max_isometric_force=5000 optimal_fiber_length=0.1246787 tendon_slack_length=0.1351657
        pennation_angle_at_optimal=0.05235988
      PathPoint P1: femur_l (0.03327 -0.220729 -0.0355644)
      PathPoint P2: femur_l (0.0384325 -0.239085 -0.0326963)
      ConditionalPathPoint P3: femur_l (0.0393503 -0.462338 -0.00630982) range=(-2.61799 -1.42) coordinate=knee_angle_l
      MovingPathPoint P4: tibia_l (0.0548266 0.025002 -0.00177934) x_coordinate=knee_angle_l y_coordinate=knee_angle_l
          z_coordinate=knee_angle_l
        x_location: MultiplierFunction: scale=0.988523
          SimmSpline: x=(-2.0944 -1.99997 -1.5708 -1.45752 -1.39626 -1.0472 -0.698132 -0.526391 -0.349066 -0.174533 0 0.00017453 0.00034907 0.0279253 0.0872665 0.174533 2.0944)
              y=(0.0082733 0.0106866 0.0202042 0.022353 0.0234583 0.0292715 0.0349465 0.037871 0.0412569 0.0465287 0.0554632 0.0554735 0.0554837 0.0571717 0.061272 0.0684368 0.0648818)
        y_location: MultiplierFunction: scale=0.988523
          SimmSpline: x=(-2.0944 -1.99997 -1.5708 -1.45752 -1.39626 -1.0472 -0.698132 -0.526391 -0.349066 -0.174533 0 0.00017453 0.00034907 0.0279253 0.0872665 0.174533 2.0944)
              y=(0.025599 0.0259487 0.0273124 0.0274796 0.0275151 0.0271363 0.0265737 0.0263073 0.0261187 0.0260129 0.0252923 0.0252911 0.0252898 0.0250526 0.0242191 0.0218288 -0.0685706)
        z_location: MultiplierFunction: scale=0.988523
          SimmSpline: x=(-2.0944 2.0944) y=(-0.0018 -0.0018)
    Thelen2003Muscle med_gas_l: max_isometric_force=2500 optimal_fiber_length=0.0901287 tendon_slack_length=0.3605148
        pennation_angle_at_optimal=0.296706
      PathPoint P1: femur_l (-0.0217976 -0.450751 0.0269601)
      ConditionalPathPoint P2: femur_l (-0.0344172 -0.46142 0.0295988) range=(-0.785398 0.174533)
          coordinate=knee_angle_l
      PathPoint P3: calcn_l (0 0.0318396 0.00544355)
    Thelen2003Muscle soleus_l: max_isometric_force=4000 optimal_fiber_length=0.0502888 tendon_slack_length=0.251444
        pennation_angle_at_optimal=0.4363323
      PathPoint P1: tibia_l (-0.00237246 -0.151541 -0.00701851)
      PathPoint P2: calcn_l (0 0.0318396 0.00544355)
    Thelen2003Muscle tib_post_l: max_isometric_force=3600 optimal_fiber_length=0.03107549 tendon_slack_length=0.3107549
        pennation_angle_at_optimal=0.2094395
      PathPoint P1: tibia_l (-0.00929212 -0.133253 -0.00187819)
      PathPoint P2: tibia_l (-0.0142347 -0.400451 0.0226372)
      PathPoint P3: calcn_l (0.0428294 0.0343046 0.0293746)
      PathPoint P4: calcn_l (0.0792909 0.0163306 0.0288611)
    Thelen2003Muscle tib_ant_l: max_isometric_force=3000 optimal_fiber_length=0.09791263 tendon_slack_length=0.2228012
        pennation_angle_at_optimal=0.08726646
      PathPoint P1: tibia_l (0.0176946 -0.160536 -0.011368)
      PathPoint P2: tibia_l (0.0325224 -0.390565 0.0174969)
      PathPoint P3: calcn_l (0.119758 0.0182821 0.0313261)
    Thelen2003Muscle ercspn_r: max_isometric_force=2500 optimal_fiber_length=0.1278847 tendon_slack_length=0.03197118
        pennation_angle_at_optimal=0
      PathPoint P1: pelvis (-0.143441 0.0449789 0.0446716)
      PathPoint P2: torso (-0.0593846 0.118769 0.0260212)
    Thelen2003Muscle ercspn_l: max_isometric_force=2500 optimal_fiber_length=0.1278847 tendon_slack_length=0.03197118
        pennation_angle_at_optimal=0
      PathPoint P1: pelvis (-0.143441 0.0449789 -0.0446716)
      PathPoint P2: torso (-0.0593846 0.118769 -0.0260212)
    Thelen2003Muscle intobl_r: max_isometric_force=900 optimal_fiber_length=0.106202 tendon_slack_length=0.106202
        pennation_angle_at_optimal=0
      PathPoint P1: pelvis (-0.0409831 0.0717204 0.118544)
      PathPoint P2: torso (0.0755804 0.172755 0.0161958)
    Thelen2003Muscle intobl_l: max_isometric_force=900 optimal_fiber_length=0.106202 tendon_slack_length=0.106202
        pennation_angle_at_optimal=0
      PathPoint P1: pelvis (-0.0409831 0.0717204 -0.118544)
      PathPoint P2: torso (0.0755804 0.172755 -0.0161958)
    Thelen2003Muscle extobl_r: max_isometric_force=900 optimal_fiber_length=0.1263775 tendon_slack_length=0.1474404
        pennation_angle_at_optimal=0
      PathPoint P1: pelvis (-0.0307373 -0.0651631 0.0102458)
      PathPoint P2: torso (0.0701818 0.118769 0.118769)
    Thelen2003Muscle extobl_l: max_isometric_force=900 optimal_fiber_length=0.1263775 tendon_slack_length=0.1474404
        pennation_angle_at_optimal=0
      PathPoint P1: pelvis (-0.0307373 -0.0651631 -0.0102458)
      PathPoint P2: torso (0.0701818 0.118769 -0.118769)
    ObjectGroup R_hip_abd: members=(glut_max1_r glut_med1_r glut_med2_r glut_med3_r peri_r sar_r tfl_r)
    ObjectGroup R_hip_flex: members=(glut_med1_r grac_r iliacus_r pect_r psoas_r rect_fem_r sar_r tfl_r)
    ObjectGroup R_hip_inrot: members=(glut_med1_r iliacus_r psoas_r tfl_r)
    ObjectGroup R_hip_exrot: members=(gem_r glut_med3_r peri_r quad_fem_r)
    ObjectGroup R_hip_ext: members=(add_mag2_r bifemlh_r glut_max1_r glut_max2_r glut_max3_r glut_med3_r)
    ObjectGroup R_hip_add: members=(add_mag2_r bifemlh_r grac_r pect_r)
    ObjectGroup R_knee_bend: members=(bifemlh_r bifemsh_r grac_r med_gas_r sar_r)
    ObjectGroup R_knee_ext: members=(rect_fem_r vas_int_r)
    ObjectGroup R_ankle_pf: members=(med_gas_r soleus_r tib_post_r)
    ObjectGroup R_inverter: members=(tib_ant_r tib_post_r)
    ObjectGroup R_ankle_df: members=tib_ant_r
    ObjectGroup L_hip_abd: members=(glut_max1_l glut_med1_l glut_med2_l glut_med3_l peri_l sar_l tfl_l)
    ObjectGroup L_hip_flex: members=(glut_med1_l grac_l iliacus_l pect_l psoas_l rect_fem_l sar_l tfl_l)
    ObjectGroup L_hip_inrot: members=(glut_med1_l iliacus_l psoas_l tfl_l)
    ObjectGroup L_hip_exrot: members=(gem_l glut_med3_l peri_l quad_fem_l)
    ObjectGroup L_hip_ext: members=(add_mag2_l bifemlh_l glut_max1_l glut_max2_l glut_max3_l glut_med3_l)
    ObjectGroup L_hip_add: members=(add_mag2_l bifemlh_l grac_l pect_l)
    ObjectGroup L_knee_bend: members=(bifemlh_l bifemsh_l grac_l med_gas_l sar_l)
    ObjectGroup L_knee_ext: members=(rect_fem_l vas_int_l)
    ObjectGroup L_ankle_pf: members=(med_gas_l soleus_l tib_post_l)
    ObjectGroup L_inverter: members=(tib_ant_l tib_post_l)
    ObjectGroup L_ankle_df: members=tib_ant_l
    ObjectGroup back_ext: members=(ercspn_l ercspn_r)
    ObjectGroup back_rlb: members=(ercspn_r extobl_r intobl_r)
    ObjectGroup back_introt: members=(ercspn_r extobl_l intobl_r)
    ObjectGroup back_llb: members=(ercspn_l extobl_l intobl_l)
    ObjectGroup back_extrot: members=(ercspn_l extobl_r intobl_l)
    ObjectGroup back_flex: members=(extobl_l extobl_r intobl_l intobl_r)
  MarkerSet:
    Marker Sternum: torso (0.103606 0.312439 1.04318e-6)
    Marker R.Acromium: torso (-0.0248718 0.426445 0.168585)
    Marker L.Acromium: torso (-0.0220089 0.440789 -0.171971)
    Marker Top.Head: torso (0.0595133 0.699598 0.0105017)
    Marker R.ASIS: pelvis (0.0228989 0.0358624 0.130116)
    Marker L.ASIS: pelvis (0.0291329 0.0276591 -0.131894)
    Marker V.Sacral: pelvis (-0.172091 0.0400029 0.00619843)
    Marker R.Thigh.Upper: femur_r (0.0507116 -0.220081 0.0883855)
    Marker R.Thigh.Front: femur_r (0.107902 -0.281747 -0.00690114)
    Marker R.Thigh.Rear: femur_r (0.0395109 -0.340915 0.0789543)
    Marker R.Knee.Lat: femur_r (-0.000586415 -0.426232 0.0605411)
    Marker R.Knee.Med: femur_r (-0.00243031 -0.442908 -0.0607482)
    Marker R.Shank.Upper: tibia_r (-0.0233139 -0.0603613 0.070733)
    Marker R.Shank.Front: tibia_r (0.0516752 -0.0954298 0.0163046)
    Marker R.Shank.Rear: tibia_r (-0.00738164 -0.145526 0.0800029)
    Marker R.Ankle.Lat: tibia_r (-0.00490543 -0.430843 0.0549207)
    Marker R.Ankle.Med: tibia_r (0.00286259 -0.416327 -0.034325)
    Marker R.Heel: calcn_r (-0.0204819 0.0172884 -0.00503735)
    Marker R.Midfoot.Sup: calcn_r (0.122708 0.0309658 -0.0403332)
    Marker R.Midfoot.Lat: calcn_r (0.117766 0.011129 0.0669726)
    Marker R.Toe.Lat: calcn_r (0.207693 -0.0114107 0.0760669)
    Marker R.Toe.Med: calcn_r (0.209814 0.00169807 -0.0323684)
    Marker R.Toe.Tip: calcn_r (0.270734 0.00315005 -0.000612297)
    Marker L.Thigh.Upper: femur_l (0.0358442 -0.20749 -0.0932573)
    Marker L.Thigh.Front: femur_l (0.114084 -0.249177 -0.0175704)
    Marker L.Thigh.Rear: femur_l (0.025891 -0.316213 -0.0778532)
    Marker L.Knee.Lat: femur_l (-0.000753513 -0.446142 -0.062296)
    Marker L.Knee.Med: femur_l (0.000472512 -0.445432 0.0539506)
    Marker L.Shank.Upper: tibia_l (0.00398588 -0.071611 -0.0777086)
    Marker L.Shank.Front: tibia_l (0.0481427 -0.121536 -0.0223037)
    Marker L.Shank.Rear: tibia_l (-0.0132436 -0.114739 -0.0885072)
    Marker L.Ankle.Lat: tibia_l (0.00383431 -0.428451 -0.0544338)
    Marker L.Ankle.Med: tibia_l (0.0078901 -0.405161 0.0369253)
    Marker L.Heel: calcn_l (-0.0226192 0.0268643 0.00786188)
    Marker L.Midfoot.Sup: calcn_l (0.149706 0.0307045 0.0342606)
    Marker L.Midfoot.Lat: calcn_l (0.131321 0.0305726 -0.064363)
    Marker L.Toe.Lat: calcn_l (0.194745 0.00778416 -0.0748386)
    Marker L.Toe.Med: calcn_l (0.211787 0.00788619 0.0273165)
    Marker L.Toe.Tip: calcn_l (0.260978 0.00906907 0.00201318)
  ProbeSet:
    UchidaUmberger2010MuscleMetabolicsProbe metabolic_power_umb: probe_operation=value
        activation_maintenance_rate_on=true shortening_rate_on=true basal_rate_on=false mechanical_work_rate_on=true
        muscle_effort_scaling_factor=0.5 report_total_metabolics_only=false
      UchidaUmberger2010MuscleMetabolicsProbe_MetabolicMuscleParameterSet:
        UchidaUmberger2010MuscleMetabolicsProbe_MetabolicMuscleParameter glut_med1_r: ratio_slow_twitch_fibers=0.55
            use_provided_muscle_mass=false
        UchidaUmberger2010MuscleMetabolicsProbe_MetabolicMuscleParameter glut_med2_r: ratio_slow_twitch_fibers=0.55
            use_provided_muscle_mass=false
        UchidaUmberger2010MuscleMetabolicsProbe_MetabolicMuscleParameter glut_med3_r: ratio_slow_twitch_fibers=0.55
            use_provided_muscle_mass=false
        UchidaUmberger2010MuscleMetabolicsProbe_MetabolicMuscleParameter bifemlh_r: ratio_slow_twitch_fibers=0.5425
            use_provided_muscle_mass=false
        UchidaUmberger2010MuscleMetabolicsProbe_MetabolicMuscleParameter bifemsh_r: ratio_slow_twitch_fibers=0.529
            use_provided_muscle_mass=false
        UchidaUmberger2010MuscleMetabolicsProbe_MetabolicMuscleParameter sar_r: ratio_slow_twitch_fibers=0.5
            use_provided_muscle_mass=false
        UchidaUmberger2010MuscleMetabolicsProbe_MetabolicMuscleParameter add_mag2_r: ratio_slow_twitch_fibers=0.552
            use_provided_muscle_mass=false
        UchidaUmberger2010MuscleMetabolicsProbe_MetabolicMuscleParameter tfl_r: ratio_slow_twitch_fibers=0.5
            use_provided_muscle_mass=false
        UchidaUmberger2010MuscleMetabolicsProbe_MetabolicMuscleParameter pect_r: ratio_slow_twitch_fibers=0.5
            use_provided_muscle_mass=false
        UchidaUmberger2010MuscleMetabolicsProbe_MetabolicMuscleParameter grac_r: ratio_slow_twitch_fibers=0.5
            use_provided_muscle_mass=false
        UchidaUmberger2010MuscleMetabolicsProbe_MetabolicMuscleParameter glut_max1_r: ratio_slow_twitch_fibers=0.55
            use_provided_muscle_mass=false
        UchidaUmberger2010MuscleMetabolicsProbe_MetabolicMuscleParameter glut_max2_r: ratio_slow_twitch_fibers=0.55
            use_provided_muscle_mass=false
        UchidaUmberger2010MuscleMetabolicsProbe_MetabolicMuscleParameter glut_max3_r: ratio_slow_twitch_fibers=0.55
            use_provided_muscle_mass=false
        UchidaUmberger2010MuscleMetabolicsProbe_MetabolicMuscleParameter iliacus_r: ratio_slow_twitch_fibers=0.5
            use_provided_muscle_mass=false
        UchidaUmberger2010MuscleMetabolicsProbe_MetabolicMuscleParameter psoas_r: ratio_slow_twitch_fibers=0.5
            use_provided_muscle_mass=false
        UchidaUmberger2010MuscleMetabolicsProbe_MetabolicMuscleParameter quad_fem_r: ratio_slow_twitch_fibers=0.5
            use_provided_muscle_mass=false
        UchidaUmberger2010MuscleMetabolicsProbe_MetabolicMuscleParameter gem_r: ratio_slow_twitch_fibers=0.5
            use_provided_muscle_mass=false
        UchidaUmberger2010MuscleMetabolicsProbe_MetabolicMuscleParameter peri_r: ratio_slow_twitch_fibers=0.5
            use_provided_muscle_mass=false
        UchidaUmberger2010MuscleMetabolicsProbe_MetabolicMuscleParameter rect_fem_r: ratio_slow_twitch_fibers=0.3865
            use_provided_muscle_mass=false
        UchidaUmberger2010MuscleMetabolicsProbe_MetabolicMuscleParameter vas_int_r: ratio_slow_twitch_fibers=0.543
            use_provided_muscle_mass=false
        UchidaUmberger2010MuscleMetabolicsProbe_MetabolicMuscleParameter med_gas_r: ratio_slow_twitch_fibers=0.566
            use_provided_muscle_mass=false
        UchidaUmberger2010MuscleMetabolicsProbe_MetabolicMuscleParameter soleus_r: ratio_slow_twitch_fibers=0.803
            use_provided_muscle_mass=false
        UchidaUmberger2010MuscleMetabolicsProbe_MetabolicMuscleParameter tib_post_r: ratio_slow_twitch_fibers=0.6
            use_provided_muscle_mass=false
        UchidaUmberger2010MuscleMetabolicsProbe_MetabolicMuscleParameter tib_ant_r: ratio_slow_twitch_fibers=0.7
            use_provided_muscle_mass=false
        UchidaUmberger2010MuscleMetabolicsProbe_MetabolicMuscleParameter glut_med1_l: ratio_slow_twitch_fibers=0.55
            use_provided_muscle_mass=false
        UchidaUmberger2010MuscleMetabolicsProbe_MetabolicMuscleParameter glut_med2_l: ratio_slow_twitch_fibers=0.55
            use_provided_muscle_mass=false
        UchidaUmberger2010MuscleMetabolicsProbe_MetabolicMuscleParameter glut_med3_l: ratio_slow_twitch_fibers=0.55
            use_provided_muscle_mass=false
        UchidaUmberger2010MuscleMetabolicsProbe_MetabolicMuscleParameter bifemlh_l: ratio_slow_twitch_fibers=0.5425
            use_provided_muscle_mass=false
        UchidaUmberger2010MuscleMetabolicsProbe_MetabolicMuscleParameter bifemsh_l: ratio_slow_twitch_fibers=0.529
            use_provided_muscle_mass=false
        UchidaUmberger2010MuscleMetabolicsProbe_MetabolicMuscleParameter sar_l: ratio_slow_twitch_fibers=0.5
            use_provided_muscle_mass=false
        UchidaUmberger2010MuscleMetabolicsProbe_MetabolicMuscleParameter add_mag2_l: ratio_slow_twitch_fibers=0.552
            use_provided_muscle_mass=false
        UchidaUmberger2010MuscleMetabolicsProbe_MetabolicMuscleParameter tfl_l: ratio_slow_twitch_fibers=0.5
            use_provided_muscle_mass=false
        UchidaUmberger2010MuscleMetabolicsProbe_MetabolicMuscleParameter pect_l: ratio_slow_twitch_fibers=0.5
            use_provided_muscle_mass=false
        UchidaUmberger2010MuscleMetabolicsProbe_MetabolicMuscleParameter grac_l: ratio_slow_twitch_fibers=0.5
            use_provided_muscle_mass=false
        UchidaUmberger2010MuscleMetabolicsProbe_MetabolicMuscleParameter glut_max1_l: ratio_slow_twitch_fibers=0.55
            use_provided_muscle_mass=false
        UchidaUmberger2010MuscleMetabolicsProbe_MetabolicMuscleParameter glut_max2_l: ratio_slow_twitch_fibers=0.55
            use_provided_muscle_mass=false
        UchidaUmberger2010MuscleMetabolicsProbe_MetabolicMuscleParameter glut_max3_l: ratio_slow_twitch_fibers=0.55
            use_provided_muscle_mass=false
        UchidaUmberger2010MuscleMetabolicsProbe_MetabolicMuscleParameter iliacus_l: ratio_slow_twitch_fibers=0.5
            use_provided_muscle_mass=false
        UchidaUmberger2010MuscleMetabolicsProbe_MetabolicMuscleParameter psoas_l: ratio_slow_twitch_fibers=0.5
            use_provided_muscle_mass=false
        UchidaUmberger2010MuscleMetabolicsProbe_MetabolicMuscleParameter quad_fem_l: ratio_slow_twitch_fibers=0.5
            use_provided_muscle_mass=false
        UchidaUmberger2010MuscleMetabolicsProbe_MetabolicMuscleParameter gem_l: ratio_slow_twitch_fibers=0.5
            use_provided_muscle_mass=false
        UchidaUmberger2010MuscleMetabolicsProbe_MetabolicMuscleParameter peri_l: ratio_slow_twitch_fibers=0.5
            use_provided_muscle_mass=false
        UchidaUmberger2010MuscleMetabolicsProbe_MetabolicMuscleParameter rect_fem_l: ratio_slow_twitch_fibers=0.3865
            use_provided_muscle_mass=false
        UchidaUmberger2010MuscleMetabolicsProbe_MetabolicMuscleParameter vas_int_l: ratio_slow_twitch_fibers=0.543
            use_provided_muscle_mass=false
        UchidaUmberger2010MuscleMetabolicsProbe_MetabolicMuscleParameter med_gas_l: ratio_slow_twitch_fibers=0.566
            use_provided_muscle_mass=false
        UchidaUmberger2010MuscleMetabolicsProbe_MetabolicMuscleParameter soleus_l: ratio_slow_twitch_fibers=0.803
            use_provided_muscle_mass=false
        UchidaUmberger2010MuscleMetabolicsProbe_MetabolicMuscleParameter tib_post_l: ratio_slow_twitch_fibers=0.6
            use_provided_muscle_mass=false
        UchidaUmberger2010MuscleMetabolicsProbe_MetabolicMuscleParameter tib_ant_l: ratio_slow_twitch_fibers=0.7
            use_provided_muscle_mass=false
        UchidaUmberger2010MuscleMetabolicsProbe_MetabolicMuscleParameter ercspn_r: ratio_slow_twitch_fibers=0.6
            use_provided_muscle_mass=false
        UchidaUmberger2010MuscleMetabolicsProbe_MetabolicMuscleParameter ercspn_l: ratio_slow_twitch_fibers=0.6
            use_provided_muscle_mass=false
        UchidaUmberger2010MuscleMetabolicsProbe_MetabolicMuscleParameter intobl_r: ratio_slow_twitch_fibers=0.56
            use_provided_muscle_mass=false
        UchidaUmberger2010MuscleMetabolicsProbe_MetabolicMuscleParameter intobl_l: ratio_slow_twitch_fibers=0.56
            use_provided_muscle_mass=false
        UchidaUmberger2010MuscleMetabolicsProbe_MetabolicMuscleParameter extobl_r: ratio_slow_twitch_fibers=0.58
            use_provided_muscle_mass=false
        UchidaUmberger2010MuscleMetabolicsProbe_MetabolicMuscleParameter extobl_l: ratio_slow_twitch_fibers=0.58
            use_provided_muscle_mass=false
    UchidaBhargava2004MuscleMetabolicsProbe metabolic_power_bha: probe_operation=value activation_rate_on=true
        maintenance_rate_on=true shortening_rate_on=true basal_rate_on=false mechanical_work_rate_on=true
        muscle_effort_scaling_factor=0.5 report_total_metabolics_only=false
      UchidaBhargava2004MuscleMetabolicsProbe_MetabolicMuscleParameterSet:
        UchidaBhargava2004MuscleMetabolicsProbe_MetabolicMuscleParameter [values shared by the 54 below unless stated]: use_provided_muscle_mass=false
            activation_constant_slow_twitch=40 activation_constant_fast_twitch=133 maintenance_constant_slow_twitch=74
            maintenance_constant_fast_twitch=111
        UchidaBhargava2004MuscleMetabolicsProbe_MetabolicMuscleParameter glut_med1_r: ratio_slow_twitch_fibers=0.55
        UchidaBhargava2004MuscleMetabolicsProbe_MetabolicMuscleParameter glut_med2_r: ratio_slow_twitch_fibers=0.55
        UchidaBhargava2004MuscleMetabolicsProbe_MetabolicMuscleParameter glut_med3_r: ratio_slow_twitch_fibers=0.55
        UchidaBhargava2004MuscleMetabolicsProbe_MetabolicMuscleParameter bifemlh_r: ratio_slow_twitch_fibers=0.5425
        UchidaBhargava2004MuscleMetabolicsProbe_MetabolicMuscleParameter bifemsh_r: ratio_slow_twitch_fibers=0.529
        UchidaBhargava2004MuscleMetabolicsProbe_MetabolicMuscleParameter sar_r: ratio_slow_twitch_fibers=0.5
        UchidaBhargava2004MuscleMetabolicsProbe_MetabolicMuscleParameter add_mag2_r: ratio_slow_twitch_fibers=0.552
        UchidaBhargava2004MuscleMetabolicsProbe_MetabolicMuscleParameter tfl_r: ratio_slow_twitch_fibers=0.5
        UchidaBhargava2004MuscleMetabolicsProbe_MetabolicMuscleParameter pect_r: ratio_slow_twitch_fibers=0.5
        UchidaBhargava2004MuscleMetabolicsProbe_MetabolicMuscleParameter grac_r: ratio_slow_twitch_fibers=0.5
        UchidaBhargava2004MuscleMetabolicsProbe_MetabolicMuscleParameter glut_max1_r: ratio_slow_twitch_fibers=0.55
        UchidaBhargava2004MuscleMetabolicsProbe_MetabolicMuscleParameter glut_max2_r: ratio_slow_twitch_fibers=0.55
        UchidaBhargava2004MuscleMetabolicsProbe_MetabolicMuscleParameter glut_max3_r: ratio_slow_twitch_fibers=0.55
        UchidaBhargava2004MuscleMetabolicsProbe_MetabolicMuscleParameter iliacus_r: ratio_slow_twitch_fibers=0.5
        UchidaBhargava2004MuscleMetabolicsProbe_MetabolicMuscleParameter psoas_r: ratio_slow_twitch_fibers=0.5
        UchidaBhargava2004MuscleMetabolicsProbe_MetabolicMuscleParameter quad_fem_r: ratio_slow_twitch_fibers=0.5
        UchidaBhargava2004MuscleMetabolicsProbe_MetabolicMuscleParameter gem_r: ratio_slow_twitch_fibers=0.5
        UchidaBhargava2004MuscleMetabolicsProbe_MetabolicMuscleParameter peri_r: ratio_slow_twitch_fibers=0.5
        UchidaBhargava2004MuscleMetabolicsProbe_MetabolicMuscleParameter rect_fem_r: ratio_slow_twitch_fibers=0.3865
        UchidaBhargava2004MuscleMetabolicsProbe_MetabolicMuscleParameter vas_int_r: ratio_slow_twitch_fibers=0.543
        UchidaBhargava2004MuscleMetabolicsProbe_MetabolicMuscleParameter med_gas_r: ratio_slow_twitch_fibers=0.566
        UchidaBhargava2004MuscleMetabolicsProbe_MetabolicMuscleParameter soleus_r: ratio_slow_twitch_fibers=0.803
        UchidaBhargava2004MuscleMetabolicsProbe_MetabolicMuscleParameter tib_post_r: ratio_slow_twitch_fibers=0.6
        UchidaBhargava2004MuscleMetabolicsProbe_MetabolicMuscleParameter tib_ant_r: ratio_slow_twitch_fibers=0.7
        UchidaBhargava2004MuscleMetabolicsProbe_MetabolicMuscleParameter glut_med1_l: ratio_slow_twitch_fibers=0.55
        UchidaBhargava2004MuscleMetabolicsProbe_MetabolicMuscleParameter glut_med2_l: ratio_slow_twitch_fibers=0.55
        UchidaBhargava2004MuscleMetabolicsProbe_MetabolicMuscleParameter glut_med3_l: ratio_slow_twitch_fibers=0.55
        UchidaBhargava2004MuscleMetabolicsProbe_MetabolicMuscleParameter bifemlh_l: ratio_slow_twitch_fibers=0.5425
        UchidaBhargava2004MuscleMetabolicsProbe_MetabolicMuscleParameter bifemsh_l: ratio_slow_twitch_fibers=0.529
        UchidaBhargava2004MuscleMetabolicsProbe_MetabolicMuscleParameter sar_l: ratio_slow_twitch_fibers=0.5
        UchidaBhargava2004MuscleMetabolicsProbe_MetabolicMuscleParameter add_mag2_l: ratio_slow_twitch_fibers=0.552
        UchidaBhargava2004MuscleMetabolicsProbe_MetabolicMuscleParameter tfl_l: ratio_slow_twitch_fibers=0.5
        UchidaBhargava2004MuscleMetabolicsProbe_MetabolicMuscleParameter pect_l: ratio_slow_twitch_fibers=0.5
        UchidaBhargava2004MuscleMetabolicsProbe_MetabolicMuscleParameter grac_l: ratio_slow_twitch_fibers=0.5
        UchidaBhargava2004MuscleMetabolicsProbe_MetabolicMuscleParameter glut_max1_l: ratio_slow_twitch_fibers=0.55
        UchidaBhargava2004MuscleMetabolicsProbe_MetabolicMuscleParameter glut_max2_l: ratio_slow_twitch_fibers=0.55
        UchidaBhargava2004MuscleMetabolicsProbe_MetabolicMuscleParameter glut_max3_l: ratio_slow_twitch_fibers=0.55
        UchidaBhargava2004MuscleMetabolicsProbe_MetabolicMuscleParameter iliacus_l: ratio_slow_twitch_fibers=0.5
        UchidaBhargava2004MuscleMetabolicsProbe_MetabolicMuscleParameter psoas_l: ratio_slow_twitch_fibers=0.5
        UchidaBhargava2004MuscleMetabolicsProbe_MetabolicMuscleParameter quad_fem_l: ratio_slow_twitch_fibers=0.5
        UchidaBhargava2004MuscleMetabolicsProbe_MetabolicMuscleParameter gem_l: ratio_slow_twitch_fibers=0.5
        UchidaBhargava2004MuscleMetabolicsProbe_MetabolicMuscleParameter peri_l: ratio_slow_twitch_fibers=0.5
        UchidaBhargava2004MuscleMetabolicsProbe_MetabolicMuscleParameter rect_fem_l: ratio_slow_twitch_fibers=0.3865
        UchidaBhargava2004MuscleMetabolicsProbe_MetabolicMuscleParameter vas_int_l: ratio_slow_twitch_fibers=0.543
        UchidaBhargava2004MuscleMetabolicsProbe_MetabolicMuscleParameter med_gas_l: ratio_slow_twitch_fibers=0.566
        UchidaBhargava2004MuscleMetabolicsProbe_MetabolicMuscleParameter soleus_l: ratio_slow_twitch_fibers=0.803
        UchidaBhargava2004MuscleMetabolicsProbe_MetabolicMuscleParameter tib_post_l: ratio_slow_twitch_fibers=0.6
        UchidaBhargava2004MuscleMetabolicsProbe_MetabolicMuscleParameter tib_ant_l: ratio_slow_twitch_fibers=0.7
        UchidaBhargava2004MuscleMetabolicsProbe_MetabolicMuscleParameter ercspn_r: ratio_slow_twitch_fibers=0.6
        UchidaBhargava2004MuscleMetabolicsProbe_MetabolicMuscleParameter ercspn_l: ratio_slow_twitch_fibers=0.6
        UchidaBhargava2004MuscleMetabolicsProbe_MetabolicMuscleParameter intobl_r: ratio_slow_twitch_fibers=0.56
        UchidaBhargava2004MuscleMetabolicsProbe_MetabolicMuscleParameter intobl_l: ratio_slow_twitch_fibers=0.56
        UchidaBhargava2004MuscleMetabolicsProbe_MetabolicMuscleParameter extobl_r: ratio_slow_twitch_fibers=0.58
        UchidaBhargava2004MuscleMetabolicsProbe_MetabolicMuscleParameter extobl_l: ratio_slow_twitch_fibers=0.58
